Mon 09/23/2024
05:25 PM
;; 1. Based on: 001
;; 2. Description: drug
;; x1. Author: www.pkpd-info.com
$PROBLEM    PK model
 ;; Change to dataset
$INPUT      CENSOR AORTA=DROP ID DROP TIME DV AMT RATE EVID MDV
$DATA      example5.CSV IGNORE=C
$SUBROUTINE ADVAN1 TRANS2 ;; 1-compartment iv data
$PK
  CL = THETA(3) * EXP(ETA(1))
  V = THETA(4) * EXP(ETA(2))

  S1 = V   ;; scaling of compartment check units of dose and observations

$THETA  (0,0.1) ; 1 prop
 (0,0.5) ; 2 add
 (0,30) ; 3 CL
 (0,200) ; 4 V
  	;; set realistic initial estimates (also for proportional and additive error)
$OMEGA  BLOCK(2)
 0.09  ;             ;     IIV-CL
 0.01 0.09  ;          _  ;      IIV-V
$SIGMA  1  FIX  ; residual variability
$ERROR  	;; For calculation based on linear (non log-transformed) data
  IPRED = F
  IRES = DV-IPRED
  W = IPRED*THETA(1)+THETA(2)
  IF (W.EQ.0) W = 1
  IWRES = IRES/W
  Y= IPRED+W*ERR(1)

$ESTIMATION METHOD=1 MAXEVAL=99999 SIG=3 PRINT=5 NOABORT POSTHOC
            INTERACTION ;; Estimation method FOCE+interaction
$COVARIANCE PRINT=E UNCONDITIONAL
$TABLE      ID IPRED IWRES CWRES EVID MDV TIME NOPRINT ONEHEADER
            FILE=SDTAB001
$TABLE      ID CL V ETA1 ETA2 NOPRINT ONEHEADER FILE=PATAB001
$TABLE      ID NOPRINT ONEHEADER FILE=COTAB001
$TABLE      ID NOPRINT ONEHEADER FILE=CATAB001

NM-TRAN MESSAGES
 WARNINGS AND ERRORS (IF ANY) FOR PROBLEM    1
 (WARNING  2) NM-TRAN INFERS THAT THE DATA ARE POPULATION.
Note: Analytical 2nd Derivatives are constructed in FSUBS but are never used.
      You may insert $ABBR DERIV2=NO after the first $PROB to save FSUBS construction and compilation time

1NONLINEAR MIXED EFFECTS MODEL PROGRAM (NONMEM) VERSION 7.5.1
 ORIGINALLY DEVELOPED BY STUART BEAL, LEWIS SHEINER, AND ALISON BOECKMANN
 CURRENT DEVELOPERS ARE ROBERT BAUER, ICON DEVELOPMENT SOLUTIONS,
 AND ALISON BOECKMANN. IMPLEMENTATION, EFFICIENCY, AND STANDARDIZATION
 PERFORMED BY NOUS INFOSYSTEMS.
 PROBLEM NO.:         1
 PK model
 TOT. NO. OF OBS RECS:     2400
 TOT. NO. OF INDIVIDUALS:      300
 ONE COMPARTMENT MODEL (ADVAN1)
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 #TBLN:      1
 #METH: First Order Conditional Estimation with Interaction
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
 #TERM:
0MINIMIZATION SUCCESSFUL
 NO. OF FUNCTION EVALUATIONS USED:      198
 NO. OF SIG. DIGITS IN FINAL EST.:  3.2
0PARAMETER ESTIMATE IS NEAR ITS BOUNDARY

 ETABAR IS THE ARITHMETIC MEAN OF THE ETA-ESTIMATES,
 AND THE P-VALUE IS GIVEN FOR THE NULL HYPOTHESIS THAT THE TRUE MEAN IS 0.

 ETABAR:         9.0871E-04 -1.1629E-03
 SE:             4.7182E-02  1.2149E-02
 N:                     300         300

 P VAL.:         9.8463E-01  9.2375E-01

 ETASHRINKSD(%)  3.2268E-01  2.3781E+00
 ETASHRINKVR(%)  6.4431E-01  4.6996E+00
 EBVSHRINKSD(%)  1.9131E-01  2.3329E+00
 EBVSHRINKVR(%)  3.8225E-01  4.6115E+00
 RELATIVEINF(%)  9.9684E+01  9.5145E+01
 EPSSHRINKSD(%)  1.6951E+01
 EPSSHRINKVR(%)  3.1028E+01


 TOTAL DATA POINTS NORMALLY DISTRIBUTED (N):         2400
 N*LOG(2PI) CONSTANT TO OBJECTIVE FUNCTION:    4410.9049593824284
 OBJECTIVE FUNCTION VALUE WITHOUT CONSTANT:   -8092.9449453551779
 OBJECTIVE FUNCTION VALUE WITH CONSTANT:      -3682.0399859727495
 REPORTED OBJECTIVE FUNCTION DOES NOT CONTAIN CONSTANT

 TOTAL EFFECTIVE ETAS (NIND*NETA):                           600


 #TERE:
 Elapsed estimation  time in seconds:    10.84
0R MATRIX ALGORITHMICALLY SINGULAR
 AND ALGORITHMICALLY NON-POSITIVE-SEMIDEFINITE
0R MATRIX IS OUTPUT
0COVARIANCE STEP ABORTED
 Elapsed covariance  time in seconds:     6.23
 Elapsed postprocess time in seconds:     0.18

 ********************               FIRST ORDER CONDITIONAL ESTIMATION WITH INTERACTION              ********************
 #OBJT:**************                       MINIMUM VALUE OF OBJECTIVE FUNCTION                      ********************
 #OBJV:********************************************    -8092.945       **************************************************

 ********************               FIRST ORDER CONDITIONAL ESTIMATION WITH INTERACTION              ********************
 ********************                             FINAL PARAMETER ESTIMATE                           ********************

 THETA - VECTOR OF FIXED EFFECTS PARAMETERS   *********
         TH 1      TH 2      TH 3      TH 4
         9.56E-02  5.00E-03  1.21E+01  7.01E+01

 OMEGA - COV MATRIX FOR RANDOM EFFECTS - ETAS  ********
         ETA1      ETA2
 ETA1
+        6.72E-01
 ETA2
+        4.62E-02  4.65E-02

 SIGMA - COV MATRIX FOR RANDOM EFFECTS - EPSILONS  ****
         EPS1
 EPS1
+        1.00E+00

 OMEGA - CORR MATRIX FOR RANDOM EFFECTS - ETAS  *******
         ETA1      ETA2
 ETA1
+        8.20E-01
 ETA2
+        2.61E-01  2.16E-01

 SIGMA - CORR MATRIX FOR RANDOM EFFECTS - EPSILONS  ***
         EPS1
 EPS1
+        1.00E+00
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 Elapsed finaloutput time in seconds:     3.05
 #CPUT: Total CPU Time in Seconds,       17.703
